// COMSOL Multiphysics 6.3.0.290 model "without rib reinforcing.mph"
// Outline of the model tree

Geometry
  geom1 "Geometry 1" (3D, length unit m)
    imp1: Import
      type = cad
      filename = C:\Users\moham\Downloads\piston normal.step
      lengthunittype = cad
      assemblycomponentstype = cad
      virtualgeometrytype = cad
      objectstoimporttype = cad
      layerstype = cad
      drillholestype = cad
      componentsstype = cad
      compattrtag = imp1.component
      cellstype = cad
      arcrecognitiontype = cad
      simplifytype = cad
      cadtype = STEP
    fin: Finalize "Form Union"
    rmd1: RemoveDetails
      detailsizetype = absolute
      maxrelsize = 0.000998516399967
      maxabssize = 8E-5
      infotype = result
      removeddetails = {{Ignored_vertices, 1}, {Collapsed_face_regions, 1}}
      aigv1: IgnoreVertices | input = fin(1) points 34
      acfr1: CollapseFaceRegions | input = aigv1(1) boundaries 3; narrowtol = manual; maxwidth = 8e-05

Materials
  mat1: Common "Material 1" on all domains
    def: def "Basic"
      density = 2770[kg/m^3]
    Enu: Enu "Young's modulus and Poisson's ratio"
      E = 73e9[Pa]
      nu = 0.33

Physics
  solid: SolidMechanics on all domains
    dependent variable u = {u, v, w}
    lemm1: LinearElasticModel "Linear Elastic Material 1" (default)
    free1: Free (default)
    init1: init "Initial Values 1" (default)
    fix1: Fixed "Fixed Constraint 1" on boundaries 35-38
    bndl1: BoundaryLoad on boundaries 1, 2 | forceType = FollowerPressure; pressure = 5e6[Pa]

Mesh
  mesh1 "Mesh 1" (physics-controlled)

Studies
  std1 "Study 1"
    stat: Stationary

Solver configurations
  sol1 "Solution 1" (study std1)
    v1: Variables "Dependent Variables 1"
    s1: Stationary "Stationary Solver 1"
      fc1: FullyCoupled
      d1: Direct "Suggested Direct Solver (solid)"

Datasets
  dset1: Solution | solution = sol1

Derived values
  max1: MaxVolume "Volume Maximum 1" on domains 1, 2
    data = dset1
    table = tbl1
    expr = {solid.misesGp, solid.disp}
    descr = {von Mises stress, Displacement magnitude}

Tables
  tbl1: Table
    // Volume Maximum 1
    von Mises stress (N/m^2) | von Mises stress (N/m^2) | Displacement magnitude (m)
    2.41209e+08 | 2.41209e+08 | 6.7753e-05

Plots
  pg1: PlotGroup3D "Stress (solid)" | data = dset1
    vol1: Volume | expr = solid.misesGp
      def: Deform "Deformation" | expr = {u, v, w}; descr = Displacement field